x := 1.1
n := 10 .. 15
f(x, n) := atan(x)*sqrt(n*nthroot(x + 1, 3))*sum(nthroot(e^(-k*x) + n*x^(k - 1), 5)/cos(k*x), k = 1 .. n)
n = [10; 11; 12; 13; 14; 15]
f(x, n) = [1282.64; 1377.97; 1472.72; 1513.57; 1586.12; 1652.93]
