y(x, e) :=
    {
        el ← x
        k ← 1
        s ← 0
    }
    while |el| > e
        s ← s + el
        el ← x^(4*k + 1)/(4*k + 1)!
        k ← k + 1
    return s
x := 0.9
y(x, 10^-5) = 0.904921
y(x, 10^-6) = 0.904922
